h := 0.5
x := [0.4; 0.9; 1.4; 1.9; 2.4]
y := [1.23; 2.31; 2.81; 3.31; 4.21]
i := [0; 1; 2; 3; 4]
P1(x) := 1.23 + 1.08/h*(x - 0.4) + (-0.58/(2!*h^2)*(x - 0.4)*(x - 0.9)) + 0.58/(3!*h^3)*(x - 0.4)*(x - 0.9)*(x - 1.4) + (-0.18/(4!*h^4)*(x - 0.4)*(x - 0.9)*(x - 1.4)*(x - 1.9)) collect → -0.12*x^4 + 1.32533333333*x^3 - 4.1252*x^2 + 5.91138666667*x - 0.556272
P1(0.7) = 1.98613
P1(2.3) = 3.98485
F(x) := -0.12*x^4 + 1.32533333333*x^3 - 4.1252*x^2 + 5.91138666667*x - 0.556272 coeffs → [-0.556272; 5.91138666667; -4.1252; 1.32533333333; -0.12]
[-0.556272; 5.91138666667; -4.1252; 1.32533333333; -0.12] = [-0.556272; 5.91139; -4.1252; 1.32533; -0.12]
